*HEADING
ekate -> Abaqus interface
(c) 2016, 2017, 2018 Hoang-Giang Bui, Ruhr-University Bochum
*NODE
1,    9.00000,    0.00000,    0.00000
2,    8.55000,    0.00000,    0.00000
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**
*ELEMENT, TYPE=C3D8
1, 1517, 1725, 1704, 1486, 1503, 1716, 1692, 1475
*ELEMENT, TYPE=C3D8
2, 1285, 1517, 1486, 1246, 1267, 1503, 1475, 1228
*ELEMENT, TYPE=C3D8
3, 1020, 1285, 1246, 979, 993, 1267, 1228, 961
*ELEMENT, TYPE=C3D8
4, 758, 1020, 979, 720, 745, 993, 961, 706
*ELEMENT, TYPE=C3D8
5, 508, 758, 720, 466, 490, 745, 706, 446
*ELEMENT, TYPE=C3D8
6, 364, 508, 466, 356, 363, 490, 446, 353
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**

*MATERIAL,NAME=TrussProperties
*MATERIAL,NAME=Isotropic3D
*MATERIAL,NAME=DruckerPrager
*MATERIAL,NAME=UserDefined
*MATERIAL,NAME=IsotropicDamage3D
*MATERIAL,NAME=GroutingMortar
*MATERIAL,NAME=TutorialDamageModel
*MATERIAL,NAME=BeamProperties
*MATERIAL,NAME=Isotropic2D
*MATERIAL,NAME=Isotropic3Dshell
*MATERIAL,NAME=VonMises
*MATERIAL,NAME=PhaseField
*MATERIAL,NAME=CamClay
*MATERIAL,NAME=die
*MATERIAL,NAME=slab

*ELSET,ELSET=slab_Set
1,
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*ELSET,ELSET=die_Set
361,
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