*HEADING
ekate -> Abaqus interface
(c) 2016 Hoang-Giang Bui, Ruhr-University Bochum
*NODE
1,    0.00000,    1.00000,    1.00000
2,    0.00000,    1.00000,    0.00000
3,    0.00000,    0.00000,    1.00000
4,    1.00000,    1.00000,    1.00000
5,    0.00000,    0.00000,    0.00000
6,    1.00000,    1.00000,    0.00000
7,    1.00000,    0.00000,    1.00000
8,    1.00000,    0.00000,    0.00000
**
*ELEMENT, TYPE=C3D8
1, 4, 1, 2, 6, 7, 3, 5, 8
**

*MATERIAL,NAME=TrussProperties
*MATERIAL,NAME=Isotropic3D
*MATERIAL,NAME=DruckerPrager
*MATERIAL,NAME=UserDefined
*MATERIAL,NAME=IsotropicDamage3D
*MATERIAL,NAME=GroutingMortar
*MATERIAL,NAME=TutorialDamageModel

*ELSET,ELSET=Isotropic3D_Set
1,
