*HEADING
ekate -> Abaqus interface
(c) 2016 Hoang-Giang Bui, Ruhr-University Bochum
*NODE
1,    0.00000,    1.00000,    0.00000
2,    0.00000,    0.83333,    0.00000
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**
*ELEMENT, TYPE=C3D27
1, 119, 115, 16, 22, 136, 132, 47, 55, 117, 54, 18, 63, 134, 80, 51, 86, 127, 122, 26, 37, 71, 58, 82, 126, 66, 31, 75
*ELEMENT, TYPE=C3D27
2, 129, 119, 22, 40, 143, 136, 55, 73, 124, 63, 29, 77, 140, 86, 64, 94, 138, 127, 37, 59, 79, 69, 90, 131, 75, 46, 88
*ELEMENT, TYPE=C3D27
3, 144, 129, 40, 74, 147, 143, 73, 92, 139, 77, 60, 95, 145, 94, 84, 99, 146, 138, 59, 85, 93, 89, 96, 142, 88, 72, 97
*ELEMENT, TYPE=C3D27
4, 217, 213, 115, 119, 234, 230, 132, 136, 215, 163, 117, 169, 232, 181, 134, 186, 225, 220, 122, 127, 174, 166, 183, 223, 171, 126, 176
*ELEMENT, TYPE=C3D27
5, 227, 217, 119, 129, 242, 234, 136, 143, 222, 169, 124, 178, 238, 186, 140, 192, 236, 225, 127, 138, 179, 172, 189, 228, 176, 131, 187
*ELEMENT, TYPE=C3D27
6, 241, 227, 129, 144, 245, 242, 143, 147, 237, 178, 139, 193, 243, 192, 145, 196, 244, 236, 138, 146, 191, 188, 194, 240, 187, 142, 195
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**

*MATERIAL,NAME=TrussProperties
*MATERIAL,NAME=Isotropic3D
*MATERIAL,NAME=DruckerPrager
*MATERIAL,NAME=UserDefined
*MATERIAL,NAME=IsotropicDamage3D
*MATERIAL,NAME=GroutingMortar
*MATERIAL,NAME=TutorialDamageModel
*MATERIAL,NAME=Isotropic3Dshell

*ELSET,ELSET=Isotropic3D_Set
1,
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