*HEADING
sd -> Abaqus interface
(c) 2016 Hoang-Giang Bui, Ruhr-University Bochum
*NODE
1,    0.00000,   20.00000,   20.00000
2,    1.00000,   20.00000,   20.00000
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
*ELEMENT, TYPE=C3D8
1, 9295, 9289, 9734, 9756, 9754, 9736, 10141, 10159
*ELEMENT, TYPE=C3D8
2, 9353, 9295, 9756, 9777, 9772, 9754, 10159, 10196
*ELEMENT, TYPE=C3D8
3, 9410, 9353, 9777, 9829, 9827, 9772, 10196, 10251
*ELEMENT, TYPE=C3D8
4, 9485, 9410, 9829, 9923, 9919, 9827, 10251, 10318
*ELEMENT, TYPE=C3D8
5, 9589, 9485, 9923, 10007, 10005, 9919, 10318, 10417
*ELEMENT, TYPE=C3D8
6, 9713, 9589, 10007, 10121, 10118, 10005, 10417, 10516
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
*MATERIAL,NAME=UserDefined
*MATERIAL,NAME=TrussProperties
*MATERIAL,NAME=BeamProperties
*MATERIAL,NAME=Isotropic2D
*MATERIAL,NAME=Isotropic3D
*MATERIAL,NAME=DruckerPrager
*MATERIAL,NAME=IsotropicDamage3D
*MATERIAL,NAME=Isotropic3Dshell
*MATERIAL,NAME=GroutingMortar
*MATERIAL,NAME=VonMises
*MATERIAL,NAME=PhaseField
*MATERIAL,NAME=CamClay

*ELSET,ELSET=Isotropic3D_Set
1,
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